// SBML level 3 version 2

function Function_for_AK(ADP, AMP, ATP, CYT, KE_AK, KMb_AK, KMf_AK, Vf_AK)
  Vf_AK/KMf_AK*(ATP*AMP - ADP*ADP/KE_AK)/(1 + ATP*AMP/KMf_AK + ADP*ADP/KMb_AK)/CYT;
end
Function_for_AK is "Function for Adenylate kinase";

function Rate_Law_for_Growth(ATP, BPG, CYT, DHAP, F6P, FBP, G6P, GAP, Km_3pg, Km_atp, Km_bpg, Km_dhap, Km_f6p, Km_fbp, Km_g6p, Km_gap, Km_nadh, Km_o2, Km_pyr, NADH, O2, PYR, _3PG, mu_max)
  mu_max*(G6P/Km_g6p/(1 + G6P/Km_g6p))*(F6P/Km_f6p/(1 + F6P/Km_f6p))*(FBP/Km_fbp/(1 + FBP/Km_fbp))*(GAP/Km_gap/(1 + GAP/Km_gap))*(DHAP/Km_dhap/(1 + DHAP/Km_dhap))*(BPG/Km_bpg/(1 + BPG/Km_bpg))*(_3PG/Km_3pg/(1 + _3PG/Km_3pg))*(PYR/Km_pyr/(1 + PYR/Km_pyr))*(ATP/Km_atp/(1 + ATP/Km_atp))*(NADH/Km_nadh/(1 + NADH/Km_nadh))*(O2/Km_o2/(1 + O2/Km_o2))/CYT;
end
Rate_Law_for_Growth is "Function for growth rate";

function Function_for_LDH(CYT, KE_LDH, KM_LDH_LAC, KM_LDH_NAD, KM_LDH_NADH, KM_LDH_PYR, LAC, NAD, NADH, PYR, Vf_LDH)
  Vf_LDH/(KM_LDH_PYR*KM_LDH_NADH)*(PYR*NADH - LAC*NAD/KE_LDH)/(1 + PYR/KM_LDH_PYR + NADH/KM_LDH_NADH + PYR*NADH/(KM_LDH_PYR*KM_LDH_NADH) + LAC/KM_LDH_LAC + NAD/KM_LDH_NAD + LAC*NAD/(KM_LDH_LAC*KM_LDH_NAD))/CYT;
end

function Function_for_GLUT(GLU, GLUe, KE_GLUT, KM_GLUT_GLU, KM_GLUT_GLUe, Vf_GLUT)
  Vf_GLUT/KM_GLUT_GLUe*(GLUe - GLU/KE_GLUT)/(1 + GLUe/KM_GLUT_GLUe + GLU/KM_GLUT_GLU);
end

function Function_for_HPI(CYT, F6P, G6P, KE_HPI, KM_HPI_F6P, KM_HPI_G6P, Vf_HPI)
  Vf_HPI/KM_HPI_G6P*(G6P - F6P/KE_HPI)/(1 + G6P/KM_HPI_G6P + F6P/KM_HPI_F6P)/CYT;
end

function Function_for_PFK(ADP, AMP, ATP, CYT, F6P, FBP, H, KA_PFK_AMP, KE_PFK, KMb_PFK, KMf_PFK, Vf_PFK)
  Vf_PFK/(KMf_PFK*KA_PFK_AMP)*(F6P*ATP*AMP - FBP*ADP*H*AMP/KE_PFK)/(1 + F6P*ATP/KMf_PFK + FBP*ADP*H/KMb_PFK + F6P*ATP*AMP/(KMf_PFK*KA_PFK_AMP) + FBP*ADP*H*AMP/(KMb_PFK*KA_PFK_AMP) + AMP/KA_PFK_AMP)/CYT;
end

function Function_for_TPI(CYT, DHAP, GAP, KE_TPI, KM_TPI_DHAP, KM_TPI_GAP, Vf_TPI)
  Vf_TPI/KM_TPI_DHAP*(DHAP - GAP/KE_TPI)/(1 + DHAP/KM_TPI_DHAP + GAP/KM_TPI_GAP)/CYT;
end

function Function_for_ENO(CYT, KE_ENO, KM_ENO_PEP, KM_ENO__2PG, PEP, Vf_ENO, _2PG)
  Vf_ENO/KM_ENO__2PG*(_2PG - PEP/KE_ENO)/(1 + _2PG/KM_ENO__2PG + PEP/KM_ENO_PEP)/CYT;
end

function Function_for_PGK(ADP, ATP, BPG, CYT, KE_PGK, KMb_PGK, KMf_PGK, Vf_PGK, _3PG)
  Vf_PGK/KMf_PGK*(BPG*ADP - _3PG*ATP/KE_PGK)/(1 + BPG*ADP/KMf_PGK + _3PG*ATP/KMb_PGK)/CYT;
end

function Function_for_LACT(KE_LACT, KM_LACT_LAC, KM_LACT_LACe, LAC, LACe, Vf_LACT)
  Vf_LACT/KM_LACT_LAC*(LAC - LACe/KE_LACT)/(1 + LAC/KM_LACT_LAC + LACe/KM_LACT_LACe);
end

function Function_for_OXPHOS(ADP, CYT, KM_OXPHOS_ADP, KM_OXPHOS_O2, KM_OXPHOS_PYR, KM_OXPHOS_NADH, NADH, O2, PYR, V_OXPHOS)
  V_OXPHOS*(PYR/(PYR + KM_OXPHOS_PYR))*(O2/(O2 + KM_OXPHOS_O2))*(ADP/(ADP + KM_OXPHOS_ADP))*(NADH/(NADH + KM_OXPHOS_NADH))/CYT;
end

function Function_for_GAPDH(BPG, CYT, GAP, H, KE_GAPDH, KM_GAPDH_BPG, KM_GAPDH_GAP, KM_GAPDH_H, KM_GAPDH_NAD, KM_GAPDH_NADH, KM_GAPDH_P, NAD, NADH, P, Vf_GAPDH)
  Vf_GAPDH/(KM_GAPDH_GAP*KM_GAPDH_NAD*KM_GAPDH_P)*(GAP*NAD*P - BPG*NADH*H/KE_GAPDH)/(1 + GAP/KM_GAPDH_GAP + NAD/KM_GAPDH_NAD + P/KM_GAPDH_P + BPG/KM_GAPDH_BPG + NADH/KM_GAPDH_NADH + GAP*NAD*P/(KM_GAPDH_GAP*KM_GAPDH_NAD*KM_GAPDH_P) + BPG*NADH*H/(KM_GAPDH_BPG*KM_GAPDH_NADH*KM_GAPDH_H))/CYT;
end

function Function_for_PGM(CYT, KE_PGM, KM_PGM__2PG, KM_PGM__3PG, Vf_PGM, _2PG, _3PG)
  Vf_PGM/KM_PGM__3PG*(_3PG - _2PG/KE_PGM)/(1 + _3PG/KM_PGM__3PG + _2PG/KM_PGM__2PG)/CYT;
end

function Function_for_ALD(CYT, DHAP, FBP, GAP, KE_ALD, KMb_ALD, KMf_ALD, Vf_ALD)
  Vf_ALD/KMf_ALD*(FBP - DHAP*GAP/KE_ALD)/(1 + FBP/KMf_ALD + DHAP*GAP/KMb_ALD)/CYT;
end

function Function_for_HK(ADP, ATP, CYT, G6P, GLU, H, KE_HK, KMb_HK, KMf_HK, Vf_HK)
  Vf_HK/KMf_HK*(GLU*ATP - G6P*ADP*H/KE_HK)/(1 + GLU*ATP/KMf_HK + G6P*ADP*H/KMb_HK)/CYT;
end

function Function_for_PK(ADP, ATP, CYT, FBP, KA_PK_FBP, KE_PK, KMb_PK, KMf_PK, PEP, PYR, Vf_PK)
  Vf_PK/(KMf_PK*KA_PK_FBP)*(PEP*ADP*FBP - PYR*ATP*FBP/KE_PK)/(1 + PEP*ADP/KMf_PK + PYR*ATP/KMb_PK + PEP*ADP*FBP/(KMf_PK*KA_PK_FBP) + PYR*ATP*FBP/(KMb_PK*KA_PK_FBP) + FBP/KA_PK_FBP)/CYT;
end

function Function_for_ATPase(ADP, ATP, CYT, H, KE_ATPase, KMb_ATPase, KMf_ATPase, P, Vf_ATPase)
  Vf_ATPase/KMf_ATPase*(ATP - ADP*P*H/KE_ATPase)/(1 + ATP/KMf_ATPase + ADP*P*H/KMb_ATPase)/CYT;
end

function Function_for_OXYT(KE_OXYT, O2, O2e, kf_OXYT)
  kf_OXYT*O2e - kf_OXYT/KE_OXYT*O2;
end

model GEM_AerobicGlycolysisGrowth()
  // GEM-embedded model of aerobic glycolysis with growth
  // model units - substance: substance, time: time_unit, volume: volume, area: area, length: length

  // Compartments:
  compartment EXT = 1;
  compartment CYT = 1;

  // Species:
  species GLU in CYT = 2.5909;
  species G6P in CYT = 0.2263;
  species F6P in CYT = 0.0701;
  species FBP in CYT = 0.45;
  species DHAP in CYT = 0.0244;
  species GAP in CYT = 0.00116;
  species BPG in CYT = 0.0686;
  species _3PG in CYT = 0.76; _3PG is "PG3";
  species _2PG in CYT = 0.0357; _2PG is "PG2";
  species PEP in CYT = 0.18;
  species PYR in CYT = 0.42;
  species LAC in CYT = 1.45;
  species ATP in CYT = 3;
  species ADP in CYT = 0.0182;
  species AMP in CYT = 3.4e-5;
  species P in CYT = 5.11;
  species NADH in CYT = 0.00373;
  species NAD in CYT = 0.546;
  species O2 in CYT = 0.076;
  species $GLUe in EXT = 5;
  species $LACe in EXT = 0.5;
  species $O2e in EXT = 0.135;
  species $H in EXT = 1e-7;

  // Parameters:
  KE_GLUT = 1;
  KM_GLUT_GLU = 2.1;
  KM_GLUT_GLUe = 2.1;
  Vf_GLUT = 100;
  KE_HK = 2329.16;
  KMb_HK = 2.94e-10;
  KMf_HK = 7.5;
  Vf_HK = 176;
  KE_HPI = 0.3258104;
  KM_HPI_F6P = 0.0773;
  KM_HPI_G6P = 0.25;
  Vf_HPI = 858;
  KA_PFK_AMP = 0.001;
  KE_PFK = 545.138;
  KMb_PFK = 1.82e-10;
  KMf_PFK = 0.23;
  Vf_PFK = 1769;
  KE_ALD = 4.822335e-5;
  KMb_ALD = 8.29e-5;
  KMf_ALD = 0.16;
  Vf_ALD = 321;
  KE_TPI = 0.04718381;
  KM_TPI_DHAP = 0.04;
  KM_TPI_GAP = 0.002;
  Vf_TPI = 859;
  KE_GAPDH = 0.3503479;
  KM_GAPDH_BPG = 0.1;
  KM_GAPDH_GAP = 0.002;
  KM_GAPDH_H = 1e-7;
  KM_GAPDH_NAD = 0.55;
  KM_GAPDH_NADH = 0.001;
  KM_GAPDH_P = 4;
  Vf_GAPDH = 781;
  KE_PGK = 6083.555;
  KMb_PGK = 1.5;
  KMf_PGK = 0.00118;
  Vf_PGK = 221;
  KE_PGM = 0.07718409;
  KM_PGM__2PG = 0.03;
  KM_PGM__3PG = 0.5;
  Vf_PGM = 528;
  KE_ENO = 6.068905;
  KM_ENO_PEP = 0.15;
  KM_ENO__2PG = 0.03;
  Vf_ENO = 1340;
  KA_PK_FBP = 0.5;
  KE_PK = 57773.87;
  KMb_PK = 0.15;
  KMf_PK = 0.00177;
  Vf_PK = 212;
  KE_LDH = 15385.09;
  KM_LDH_LAC = 5;
  KM_LDH_NAD = 0.549;
  KM_LDH_NADH = 0.001;
  KM_LDH_PYR = 0.5;
  Vf_LDH = 434;
  KE_LACT = 1;
  KM_LACT_LAC = 3;
  KM_LACT_LACe = 3;
  Vf_LACT = 60;
  KM_OXPHOS_ADP = 0.005;
  KM_OXPHOS_O2 = 0.005;
  KM_OXPHOS_PYR = 0.001;
  KM_OXPHOS_NADH = 0.001;
  V_OXPHOS = 5.25;
  KE_ATPase = 478343.7;
  KMb_ATPase = 4.71e-9;
  KMf_ATPase = 3;
  Vf_ATPase = 390;
  KE_OXYT = 1;
  kf_OXYT = 164;
  Growth_Km_3pg = 0.5;
  Growth_Km_atp = 3;
  Growth_Km_bpg = 0.1;
  Growth_Km_dhap = 0.0414;
  Growth_Km_f6p = 0.0773;
  Growth_Km_fbp = 0.155;
  Growth_Km_g6p = 0.25;
  Growth_Km_gap = 0.002;
  Growth_Km_nadh = 0.001;
  Growth_Km_o2 = 0.04;
  Growth_Km_pyr = 0.5;
  Vf_GROWTH = 200;
  KE_AK = 1;
  KMb_AK = 2;
  KMf_AK = 5;
  Vf_AK = 2000;

  // Reactions:
  GLUT: $GLUe -> GLU; Function_for_GLUT(GLU, GLUe, KE_GLUT, KM_GLUT_GLU, KM_GLUT_GLUe, Vf_GLUT);
  HK: GLU + ATP => G6P + ADP + $H; Function_for_HK(ADP, ATP, CYT, G6P, GLU, H, KE_HK, KMb_HK, KMf_HK, Vf_HK);
  HPI: G6P -> F6P; CYT*Function_for_HPI(CYT, F6P, G6P, KE_HPI, KM_HPI_F6P, KM_HPI_G6P, Vf_HPI);
  PFK: F6P + ATP => FBP + ADP + $H; Function_for_PFK(ADP, AMP, ATP, CYT, F6P, FBP, H, KA_PFK_AMP, KE_PFK, KMb_PFK, KMf_PFK, Vf_PFK);  // modifiers: AMP
  ALD: FBP -> DHAP + GAP; CYT*Function_for_ALD(CYT, DHAP, FBP, GAP, KE_ALD, KMb_ALD, KMf_ALD, Vf_ALD);
  TPI: DHAP -> GAP; CYT*Function_for_TPI(CYT, DHAP, GAP, KE_TPI, KM_TPI_DHAP, KM_TPI_GAP, Vf_TPI);
  GAPDH: GAP + NAD + P -> BPG + NADH + $H; Function_for_GAPDH(BPG, CYT, GAP, H, KE_GAPDH, KM_GAPDH_BPG, KM_GAPDH_GAP, KM_GAPDH_H, KM_GAPDH_NAD, KM_GAPDH_NADH, KM_GAPDH_P, NAD, NADH, P, Vf_GAPDH);
  PGK: BPG + ADP -> _3PG + ATP; CYT*Function_for_PGK(ADP, ATP, BPG, CYT, KE_PGK, KMb_PGK, KMf_PGK, Vf_PGK, _3PG);
  PGM: _3PG -> _2PG; CYT*Function_for_PGM(CYT, KE_PGM, KM_PGM__2PG, KM_PGM__3PG, Vf_PGM, _2PG, _3PG);
  ENO: _2PG -> PEP; CYT*Function_for_ENO(CYT, KE_ENO, KM_ENO_PEP, KM_ENO__2PG, PEP, Vf_ENO, _2PG);
  PK: PEP + ADP => PYR + ATP; CYT*Function_for_PK(ADP, ATP, CYT, FBP, KA_PK_FBP, KE_PK, KMb_PK, KMf_PK, PEP, PYR, Vf_PK);  // modifiers: FBP
  LDH: PYR + NADH -> LAC + NAD; CYT*Function_for_LDH(CYT, KE_LDH, KM_LDH_LAC, KM_LDH_NAD, KM_LDH_NADH, KM_LDH_PYR, LAC, NAD, NADH, PYR, Vf_LDH);
  LACT: LAC -> $LACe; Function_for_LACT(KE_LACT, KM_LACT_LAC, KM_LACT_LACe, LAC, LACe, Vf_LACT);
  OXPHOS: PYR + 14.75 ADP + 14.75 P + 3 O2 + NADH => NAD + 14.75 ATP; CYT*Function_for_OXPHOS(ADP, CYT, KM_OXPHOS_ADP, KM_OXPHOS_O2, KM_OXPHOS_PYR, KM_OXPHOS_NADH, NADH, O2, PYR, V_OXPHOS);
  ATPase: ATP -> ADP + P + $H; Function_for_ATPase(ADP, ATP, CYT, H, KE_ATPase, KMb_ATPase, KMf_ATPase, P, Vf_ATPase);
  OXYT: $O2e -> O2; Function_for_OXYT(KE_OXYT, O2, O2e, kf_OXYT);
  Growth: 0.07 BPG + 48.01 _3PG + 19.53 DHAP + 0.43 FBP + 47.12 O2 + 16.47 F6P + 7 GAP + 41.29 G6P + 289.58 NADH + 241.5 PYR + 6295.43 ATP => 6295.43 ADP + 289.58 NAD + 6428.7 P; CYT*Rate_Law_for_Growth(ATP, BPG, CYT, DHAP, F6P, FBP, G6P, GAP, Growth_Km_3pg, Growth_Km_atp, Growth_Km_bpg, Growth_Km_dhap, Growth_Km_f6p, Growth_Km_fbp, Growth_Km_g6p, Growth_Km_gap, Growth_Km_nadh, Growth_Km_o2, Growth_Km_pyr, NADH, O2, PYR, _3PG, Vf_GROWTH);
  AK: ATP + AMP -> 2 ADP; CYT*Function_for_AK(ADP, AMP, ATP, CYT, KE_AK, KMb_AK, KMf_AK, Vf_AK);

  // Unit definitions:
  unit length = metre;
  unit area = metre^2;
  unit volume = litre;
  unit time_unit = second;
  unit substance = mole;
end
